R := 7.5*10^3
Fc := 12000
Ca := 0.9548/(2*π*Fc*R) = 1.68846e-9
Cb := 0.4998/(2*π*Fc*R) = 8.8384e-10
Cc := 0.7560/(2*π*Fc*R) = 1.3369e-9
# С учётом ряда E24 получаем следющие значения
R == 7.5*kOhm
Ca == 1.6 nF
Cb == 9.1 nF
Cc == 1.3 nF
R = 7500
Fc1 := 12000 Hz
Ca1 := 0.9548/(2*π*Fc1*R)
Cb1 := 0.4998/(2*π*Fc1*R)
Cc1 := 0.7560/(2*π*Fc1*R)
Ca1 = 1.68846e-9 s
Cb1 = 8.8384e-10 s
Cc1 = 1.3369e-9 s
